*Heading
** Job name: cube_compression2 Model name: cube_compression2
** Generated by: Abaqus/CAE Unofficial Packaging Version
*Preprint, echo=NO, model=NO, history=NO, contact=NO
**
** PARTS
**
*Part, name=PART-1
*Node
      1,           1.,           1.,           1.
      2,           1.,         0.75,           1.
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*Element, type=C3D8R
 1,  26,  27,  32,  31,   1,   2,   7,   6
 2,  27,  28,  33,  32,   2,   3,   8,   7
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*Elset, elset=ELEMENTO, generate
  1,  64,   1
*Orientation, name=Ori-1
          1.,           0.,           0.,           0.,           1.,           0.
3, 0.
** Section: Section-1-ELEMENTO
*Solid Section, elset=ELEMENTO, orientation=Ori-1, material=VTC401
1.,
*End Part
**
**
** ASSEMBLY
**
*Assembly, name=Assembly
**
*Instance, name=PART-1-1, part=PART-1
*End Instance
**
*Nset, nset=ALL, instance=PART-1-1, generate
   1,  125,    1
*Nset, nset=DOWN, instance=PART-1-1, generate
   5,  125,    5
*Nset, nset=LEFT, instance=PART-1-1, generate
 101,  125,    1
*Nset, nset=RIGHT, instance=PART-1-1, generate
  1,  25,   1
*Nset, nset=UP, instance=PART-1-1, generate
   1,  121,    5
*End Assembly
*Amplitude, name=AMP-1, definition=SMOOTH STEP
             0.,              0.,           1e-05,              1.
**
** MATERIALS
**
**      **********************
**
**      COMMENTS FROM *DEPVAR
**      =====================
**
**      ***
*Material, name=VTC401
*Density
 1.5e-06,
*Depvar, delete=20
     24,
*User Material, constants=20
**    E1       E22       E33      nu12       nu13      nu23       G12       G13
     116.6,    7.7,      7.7,      0.3,     0.3,       0.47,      6.47,     6.47
**   G23       XT         XC        YT        YC        SL      alpha0      G1+
      3.5,     2.354,    1.102,    0.0343,   0.184,    0.0827,    53.,      0.1
**   G1-       G2+       G2-        G6
     0.1,    0.0003,   0.0003,   0.0008
**
** ----------------------------------------------------------------
**
** STEP: Step-1
**
*Step, name=Step-1, nlgeom=YES
*Dynamic, Explicit
, 30.
*Bulk Viscosity
0.06, 1.2
**
** BOUNDARY CONDITIONS
**
** Name: Disp-BC-1 Type: Displacement/Rotation
*Boundary
DOWN, 2, 2
** Name: Vel-BC-1 Type: Velocity/Angular velocity
*Boundary, amplitude=AMP-1, type=VELOCITY
UP, 2, 2, -0.001
**
** OUTPUT REQUESTS
**
*Restart, write, number interval=1, time marks=NO
**
** FIELD OUTPUT: F-Output-2
**
*Output, field, variable=PRESELECT, number interval=100
**
** HISTORY OUTPUT: H-Output-1
**
*Output, history, variable=PRESELECT
*End Step
